<?xml version="1.0" ?>
<Node name="root" dt="0.05" showBoundingTree="0" gravity="0 -9.8 0">
    <VisualStyle displayFlags="showBehaviorModels showVisual" />
    <DefaultVisualManagerLoop/>

    <DefaultAnimationLoop />
    <BruteForceBroadPhase/>
    <BVHNarrowPhase/>
    <DefaultContactManager name="collision response" response="PenalityContactForceField" />
	<MinProximityIntersection name="Proximity" alarmDistance="0.8" contactDistance="0.5" />

    <Node name="Liver">
        <EulerImplicitSolver name="cg_odesolver" rayleighStiffness="0.1" rayleighMass="0.1" />
        <CGLinearSolver iterations="25" name="linear solver" tolerance="1.0e-9" threshold="1.0e-9" />
        <MeshGmshLoader name="loader" filename="./mesh/liver2.msh" />
        <MechanicalObject src="@loader" name="Volume" scale3d="20 20 20" rotation="140 180 0"/>

		<TetrahedronSetTopologyContainer  name="Container" position="@Volume.position" src="@loader" tags=" "/>
		<TetrahedronSetTopologyModifier   name="Modifier" />
		<TetrahedronSetGeometryAlgorithms name="TopoAlgo"  template="Vec3d" />

        <DiagonalMass massDensity="1.0" />
        <BoxROI template="Vec3d" box="4 -4 -3 10 2 3" drawBoxes="1" position="@Volume.rest_position" name="FixedROI"/>
		<TetrahedronFEMForceField name="FEM" youngModulus="1300" poissonRatio="0.3" computeGlobalMatrix="false" method="large" />
		<PlaneForceField normal="0 1 0" d="-50" stiffness="100000" showPlane="1" showPlaneSize="20"/>
        <Node name="Surface">
            <TriangleSetTopologyContainer  name="Container" fileTopology="" tags=" " />
			<TriangleSetTopologyModifier   name="Modifier" />
			<TriangleSetGeometryAlgorithms name="TopoAlgo"   template="Vec3d" />

            <Tetra2TriangleTopologicalMapping input="@../Container" output="@Container" />
			<TriangularBendingSprings name="FEM-Bend" stiffness="600" damping="1.0" />
			<TriangleCollisionModel />

            <Node name="Visu_liver">
                <OglModel name="VisualLiver" />
                <IdentityMapping input="@../../Volume" output="@VisualLiver" />
            </Node>
        </Node>
    </Node>


    <Node name="flag">
        <EulerImplicitSolver name="cg_odesolver" printLog="false" />
        <CGLinearSolver iterations="25" name="linear solver" tolerance="1.0e-9" threshold="1.0e-9" />
        <MeshOBJLoader name="meshLoader" filename="mesh/flag.obj" rotation="0 180 0" scale="10" createSubelements="true" translation="0 5 50"/>
        <TriangleSetTopologyContainer  name="Container" src="@meshLoader" tags=" " />
		<TriangleSetTopologyModifier   name="Modifier" />
		<TriangleSetGeometryAlgorithms name="TopoAlgo"   template="Vec3d" />

        <MechanicalObject/>
        <DiagonalMass massDensity="0.1" />
        <FixedConstraint indices="317 221 316 207 206 213" />
        <TriangularFEMForceField name="FEM" youngModulus="600" poissonRatio="0.3" method="large" />
        <TriangularBendingSprings name="FEM-Bend" stiffness="300" damping="1.0" />
        <TriangleCollisionModel />
        <PlaneForceField normal="0 1 0" d="-50" stiffness="100000" showPlane="1" showPlaneSize="20"/>
		<Node name="visu_flag">
            <MeshOBJLoader name="meshLoaderVisu" filename="./mesh/flag.obj" handleSeams="1" />
            <OglModel  name="VisualFlag" src="@meshLoaderVisu"/>
			<IdentityMapping input="@../" output="@VisualFlag" />
		</Node>
    </Node>
</Node>
        <!--<FixedConstraint indices="@FixedROI.indices" />-->
        <!--<TetrahedralCorotationalFEMForceField name="FEM" youngModulus="1300" poissonRatio="0.3" method="large" />		-->
